*Heading
*Preprint, echo=NO, model=NO, history=NO, contact=NO
*Part, name=PART-1
*Node
1 , 0.0 , 0.0 , 0.0
2 , 4.0 , 0.0 , 0.0
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*Element, type=S4R
1 , 1 , 2 , 548 , 547
2 , 2 , 3 , 549 , 548
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*Elset, elset=Edge-0
1, 121, 241, 361, 481, 601
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*Distribution, name=EdgeDist-0, location=ELEMENT, Table=EdgeDist-0_Table
,     1.
1 , 1.5
121 , 1.5
241 , 1.5
361 , 1.5
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11885 , 1.5
*Shell Section, elset=Edge-0, material=MAT, controls=EC-1, shell thickness=EdgeDist-0
1., 5
*Elset, elset=Edge-1
6, 126, 246, 366, 486, 606
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*Distribution, name=EdgeDist-1, location=ELEMENT, Table=EdgeDist-1_Table
,     1.
6 , 1.5
126 , 1.5
246 , 1.5
366 , 1.5
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11890 , 1.5
*Shell Section, elset=Edge-1, material=MAT, controls=EC-1, shell thickness=EdgeDist-1
1., 5
*Elset, elset=Edge-2
11, 131, 251, 371, 491, 611
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*Distribution, name=EdgeDist-2, location=ELEMENT, Table=EdgeDist-2_Table
,     1.
11 , 1.5
131 , 1.5
251 , 1.5
371 , 1.5
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11895 , 1.5
*Shell Section, elset=Edge-2, material=MAT, controls=EC-1, shell thickness=EdgeDist-2
1., 5
*Elset, elset=Edge-3
16, 136, 256, 376, 496, 616
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*Distribution, name=EdgeDist-3, location=ELEMENT, Table=EdgeDist-3_Table
,     1.
16 , 1.5
136 , 1.5
256 , 1.5
376 , 1.5
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11900 , 1.5
*Shell Section, elset=Edge-3, material=MAT, controls=EC-1, shell thickness=EdgeDist-3
1., 5
*Elset, elset=Edge-4
21, 141, 261, 381, 501, 621
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*Distribution, name=EdgeDist-4, location=ELEMENT, Table=EdgeDist-4_Table
,     1.
21 , 0.4283
141 , 0.4283
261 , 0.4283
381 , 0.4283
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11905 , 0.4283
*Shell Section, elset=Edge-4, material=MAT, controls=EC-1, shell thickness=EdgeDist-4
1., 5
*Elset, elset=Edge-5
26, 146, 266, 386, 506, 626
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*Distribution, name=EdgeDist-5, location=ELEMENT, Table=EdgeDist-5_Table
,     1.
26 , 0.4283
146 , 0.4283
266 , 0.4283
386 , 0.4283
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11910 , 0.4283
*Shell Section, elset=Edge-5, material=MAT, controls=EC-1, shell thickness=EdgeDist-5
1., 5
*Elset, elset=Edge-6
31, 151, 271, 391, 511, 631
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*Distribution, name=EdgeDist-6, location=ELEMENT, Table=EdgeDist-6_Table
,     1.
31 , 0.4283
151 , 0.4283
271 , 0.4283
391 , 0.4283
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11915 , 0.4283
*Shell Section, elset=Edge-6, material=MAT, controls=EC-1, shell thickness=EdgeDist-6
1., 5
*Elset, elset=Edge-7
36, 156, 276, 396, 516, 636
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*Distribution, name=EdgeDist-7, location=ELEMENT, Table=EdgeDist-7_Table
,     1.
36 , 0.4283
156 , 0.4283
276 , 0.4283
396 , 0.4283
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11920 , 0.4283
*Shell Section, elset=Edge-7, material=MAT, controls=EC-1, shell thickness=EdgeDist-7
1., 5
*Elset, elset=Edge-8
41, 161, 281, 401, 521, 641
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*Distribution, name=EdgeDist-8, location=ELEMENT, Table=EdgeDist-8_Table
,     1.
41 , 0.4283
161 , 0.4283
281 , 0.4283
401 , 0.4283
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11925 , 0.4283
*Shell Section, elset=Edge-8, material=MAT, controls=EC-1, shell thickness=EdgeDist-8
1., 5
*Elset, elset=Edge-9
46, 166, 286, 406, 526, 646
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*Distribution, name=EdgeDist-9, location=ELEMENT, Table=EdgeDist-9_Table
,     1.
46 , 0.4283
166 , 0.4283
286 , 0.4283
406 , 0.4283
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11930 , 0.4283
*Shell Section, elset=Edge-9, material=MAT, controls=EC-1, shell thickness=EdgeDist-9
1., 5
*Elset, elset=Edge-10
51, 171, 291, 411, 531, 651
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*Distribution, name=EdgeDist-10, location=ELEMENT, Table=EdgeDist-10_Table
,     1.
51 , 0.4283
171 , 0.4283
291 , 0.4283
411 , 0.4283
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11935 , 0.4283
*Shell Section, elset=Edge-10, material=MAT, controls=EC-1, shell thickness=EdgeDist-10
1., 5
*Elset, elset=Edge-11
56, 176, 296, 416, 536, 656
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*Distribution, name=EdgeDist-11, location=ELEMENT, Table=EdgeDist-11_Table
,     1.
56 , 0.4283
176 , 0.4283
296 , 0.4283
416 , 0.4283
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11940 , 0.4283
*Shell Section, elset=Edge-11, material=MAT, controls=EC-1, shell thickness=EdgeDist-11
1., 5
*Elset, elset=Edge-12
61, 181, 301, 421, 541, 661
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*Distribution, name=EdgeDist-12, location=ELEMENT, Table=EdgeDist-12_Table
,     1.
61 , 0.4283
181 , 0.4283
301 , 0.4283
421 , 0.4283
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11945 , 0.4283
*Shell Section, elset=Edge-12, material=MAT, controls=EC-1, shell thickness=EdgeDist-12
1., 5
*Elset, elset=Edge-13
66, 186, 306, 426, 546, 666
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*Distribution, name=EdgeDist-13, location=ELEMENT, Table=EdgeDist-13_Table
,     1.
66 , 0.4283
186 , 0.4283
306 , 0.4283
426 , 0.4283
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11950 , 0.4283
*Shell Section, elset=Edge-13, material=MAT, controls=EC-1, shell thickness=EdgeDist-13
1., 5
*Elset, elset=Edge-14
71, 191, 311, 431, 551, 671
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*Distribution, name=EdgeDist-14, location=ELEMENT, Table=EdgeDist-14_Table
,     1.
71 , 0.4283
191 , 0.4283
311 , 0.4283
431 , 0.4283
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11955 , 0.4283
*Shell Section, elset=Edge-14, material=MAT, controls=EC-1, shell thickness=EdgeDist-14
1., 5
*Elset, elset=Edge-15
76, 196, 316, 436, 556, 676
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*Distribution, name=EdgeDist-15, location=ELEMENT, Table=EdgeDist-15_Table
,     1.
76 , 0.4283
196 , 0.4283
316 , 0.4283
436 , 0.4283
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11960 , 0.4283
*Shell Section, elset=Edge-15, material=MAT, controls=EC-1, shell thickness=EdgeDist-15
1., 5
*Elset, elset=Edge-16
81, 201, 321, 441, 561, 681
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*Distribution, name=EdgeDist-16, location=ELEMENT, Table=EdgeDist-16_Table
,     1.
81 , 0.4283
201 , 0.4283
321 , 0.4283
441 , 0.4283
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11965 , 0.4283
*Shell Section, elset=Edge-16, material=MAT, controls=EC-1, shell thickness=EdgeDist-16
1., 5
*Elset, elset=Edge-17
86, 206, 326, 446, 566, 686
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*Distribution, name=EdgeDist-17, location=ELEMENT, Table=EdgeDist-17_Table
,     1.
86 , 0.4283
206 , 0.4283
326 , 0.4283
446 , 0.4283
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11970 , 0.4283
*Shell Section, elset=Edge-17, material=MAT, controls=EC-1, shell thickness=EdgeDist-17
1., 5
*Elset, elset=Edge-18
91, 211, 331, 451, 571, 691
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*Distribution, name=EdgeDist-18, location=ELEMENT, Table=EdgeDist-18_Table
,     1.
91 , 0.4283
211 , 0.4283
331 , 0.4283
451 , 0.4283
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11975 , 0.4283
*Shell Section, elset=Edge-18, material=MAT, controls=EC-1, shell thickness=EdgeDist-18
1., 5
*Elset, elset=Edge-19
96, 216, 336, 456, 576, 696
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*Distribution, name=EdgeDist-19, location=ELEMENT, Table=EdgeDist-19_Table
,     1.
96 , 0.4283
216 , 0.4283
336 , 0.4283
456 , 0.4283
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11980 , 0.4283
*Shell Section, elset=Edge-19, material=MAT, controls=EC-1, shell thickness=EdgeDist-19
1., 5
*Elset, elset=Edge-20
101, 221, 341, 461, 581, 701
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*Distribution, name=EdgeDist-20, location=ELEMENT, Table=EdgeDist-20_Table
,     1.
101 , 1.5
221 , 1.5
341 , 1.5
461 , 1.5
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11985 , 1.5
*Shell Section, elset=Edge-20, material=MAT, controls=EC-1, shell thickness=EdgeDist-20
1., 5
*Elset, elset=Edge-21
106, 226, 346, 466, 586, 706
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*Distribution, name=EdgeDist-21, location=ELEMENT, Table=EdgeDist-21_Table
,     1.
106 , 1.5
226 , 1.5
346 , 1.5
466 , 1.5
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11990 , 1.5
*Shell Section, elset=Edge-21, material=MAT, controls=EC-1, shell thickness=EdgeDist-21
1., 5
*Elset, elset=Edge-22
111, 231, 351, 471, 591, 711
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*Distribution, name=EdgeDist-22, location=ELEMENT, Table=EdgeDist-22_Table
,     1.
111 , 1.5
231 , 1.5
351 , 1.5
471 , 1.5
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11995 , 1.5
*Shell Section, elset=Edge-22, material=MAT, controls=EC-1, shell thickness=EdgeDist-22
1., 5
*Elset, elset=Edge-23
116, 236, 356, 476, 596, 716
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*Distribution, name=EdgeDist-23, location=ELEMENT, Table=EdgeDist-23_Table
,     1.
116 , 1.5
236 , 1.5
356 , 1.5
476 , 1.5
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12000 , 1.5
*Shell Section, elset=Edge-23, material=MAT, controls=EC-1, shell thickness=EdgeDist-23
1., 5
*Elset, elset=Edge-24
12001, 12126, 12251, 12376, 12501, 12626
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*Distribution, name=EdgeDist-24, location=ELEMENT, Table=EdgeDist-24_Table
,     1.
12001 , 1.5
12126 , 1.5
12251 , 1.5
12376 , 1.5
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24396 , 1.5
*Shell Section, elset=Edge-24, material=MAT, controls=EC-1, shell thickness=EdgeDist-24
1., 5
*Elset, elset=Edge-25
12002, 12127, 12252, 12377, 12502, 12627
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*Distribution, name=EdgeDist-25, location=ELEMENT, Table=EdgeDist-25_Table
,     1.
12002 , 0.4283
12127 , 0.4283
12252 , 0.4283
12377 , 0.4283
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24397 , 0.4283
*Shell Section, elset=Edge-25, material=MAT, controls=EC-1, shell thickness=EdgeDist-25
1., 5
*Elset, elset=Edge-26
12003, 12128, 12253, 12378, 12503, 12628
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*Distribution, name=EdgeDist-26, location=ELEMENT, Table=EdgeDist-26_Table
,     1.
12003 , 0.4283
12128 , 0.4283
12253 , 0.4283
12378 , 0.4283
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24398 , 0.4283
*Shell Section, elset=Edge-26, material=MAT, controls=EC-1, shell thickness=EdgeDist-26
1., 5
*Elset, elset=Edge-27
12004, 12129, 12254, 12379, 12504, 12629
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*Distribution, name=EdgeDist-27, location=ELEMENT, Table=EdgeDist-27_Table
,     1.
12004 , 0.4283
12129 , 0.4283
12254 , 0.4283
12379 , 0.4283
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24399 , 0.4283
*Shell Section, elset=Edge-27, material=MAT, controls=EC-1, shell thickness=EdgeDist-27
1., 5
*Elset, elset=Edge-28
12005, 12130, 12255, 12380, 12505, 12630
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*Distribution, name=EdgeDist-28, location=ELEMENT, Table=EdgeDist-28_Table
,     1.
12005 , 1.5
12130 , 1.5
12255 , 1.5
12380 , 1.5
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24400 , 1.5
*Shell Section, elset=Edge-28, material=MAT, controls=EC-1, shell thickness=EdgeDist-28
1., 5
*Elset, elset=Edge-29
12026, 12151, 12276, 12401, 12526, 12651
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*Distribution, name=EdgeDist-29, location=ELEMENT, Table=EdgeDist-29_Table
,     1.
12026 , 1.5
12151 , 1.5
12276 , 1.5
12401 , 1.5
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24421 , 1.5
*Shell Section, elset=Edge-29, material=MAT, controls=EC-1, shell thickness=EdgeDist-29
1., 5
*Elset, elset=Edge-30
12027, 12152, 12277, 12402, 12527, 12652
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*Distribution, name=EdgeDist-30, location=ELEMENT, Table=EdgeDist-30_Table
,     1.
12027 , 0.4283
12152 , 0.4283
12277 , 0.4283
12402 , 0.4283
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24422 , 0.4283
*Shell Section, elset=Edge-30, material=MAT, controls=EC-1, shell thickness=EdgeDist-30
1., 5
*Elset, elset=Edge-31
12028, 12153, 12278, 12403, 12528, 12653
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*Distribution, name=EdgeDist-31, location=ELEMENT, Table=EdgeDist-31_Table
,     1.
12028 , 0.4283
12153 , 0.4283
12278 , 0.4283
12403 , 0.4283
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24423 , 0.4283
*Shell Section, elset=Edge-31, material=MAT, controls=EC-1, shell thickness=EdgeDist-31
1., 5
*Elset, elset=Edge-32
12029, 12154, 12279, 12404, 12529, 12654
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*Distribution, name=EdgeDist-32, location=ELEMENT, Table=EdgeDist-32_Table
,     1.
12029 , 0.4283
12154 , 0.4283
12279 , 0.4283
12404 , 0.4283
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24424 , 0.4283
*Shell Section, elset=Edge-32, material=MAT, controls=EC-1, shell thickness=EdgeDist-32
1., 5
*Elset, elset=Edge-33
12030, 12155, 12280, 12405, 12530, 12655
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*Distribution, name=EdgeDist-33, location=ELEMENT, Table=EdgeDist-33_Table
,     1.
12030 , 1.5
12155 , 1.5
12280 , 1.5
12405 , 1.5
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24425 , 1.5
*Shell Section, elset=Edge-33, material=MAT, controls=EC-1, shell thickness=EdgeDist-33
1., 5
*Elset, elset=Edge-34
12051, 12176, 12301, 12426, 12551, 12676
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*Distribution, name=EdgeDist-34, location=ELEMENT, Table=EdgeDist-34_Table
,     1.
12051 , 1.5
12176 , 1.5
12301 , 1.5
12426 , 1.5
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24446 , 1.5
*Shell Section, elset=Edge-34, material=MAT, controls=EC-1, shell thickness=EdgeDist-34
1., 5
*Elset, elset=Edge-35
12052, 12177, 12302, 12427, 12552, 12677
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*Distribution, name=EdgeDist-35, location=ELEMENT, Table=EdgeDist-35_Table
,     1.
12052 , 0.4283
12177 , 0.4283
12302 , 0.4283
12427 , 0.4283
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24447 , 0.4283
*Shell Section, elset=Edge-35, material=MAT, controls=EC-1, shell thickness=EdgeDist-35
1., 5
*Elset, elset=Edge-36
12053, 12178, 12303, 12428, 12553, 12678
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*Distribution, name=EdgeDist-36, location=ELEMENT, Table=EdgeDist-36_Table
,     1.
12053 , 0.4283
12178 , 0.4283
12303 , 0.4283
12428 , 0.4283
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24448 , 0.4283
*Shell Section, elset=Edge-36, material=MAT, controls=EC-1, shell thickness=EdgeDist-36
1., 5
*Elset, elset=Edge-37
12054, 12179, 12304, 12429, 12554, 12679
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*Distribution, name=EdgeDist-37, location=ELEMENT, Table=EdgeDist-37_Table
,     1.
12054 , 0.4283
12179 , 0.4283
12304 , 0.4283
12429 , 0.4283
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24449 , 0.4283
*Shell Section, elset=Edge-37, material=MAT, controls=EC-1, shell thickness=EdgeDist-37
1., 5
*Elset, elset=Edge-38
12055, 12180, 12305, 12430, 12555, 12680
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*Distribution, name=EdgeDist-38, location=ELEMENT, Table=EdgeDist-38_Table
,     1.
12055 , 1.5
12180 , 1.5
12305 , 1.5
12430 , 1.5
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24450 , 1.5
*Shell Section, elset=Edge-38, material=MAT, controls=EC-1, shell thickness=EdgeDist-38
1., 5
*Elset, elset=Edge-39
12076, 12201, 12326, 12451, 12576, 12701
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*Distribution, name=EdgeDist-39, location=ELEMENT, Table=EdgeDist-39_Table
,     1.
12076 , 1.5
12201 , 1.5
12326 , 1.5
12451 , 1.5
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24471 , 1.5
*Shell Section, elset=Edge-39, material=MAT, controls=EC-1, shell thickness=EdgeDist-39
1., 5
*Elset, elset=Edge-40
12077, 12202, 12327, 12452, 12577, 12702
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*Distribution, name=EdgeDist-40, location=ELEMENT, Table=EdgeDist-40_Table
,     1.
12077 , 0.4283
12202 , 0.4283
12327 , 0.4283
12452 , 0.4283
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24472 , 0.4283
*Shell Section, elset=Edge-40, material=MAT, controls=EC-1, shell thickness=EdgeDist-40
1., 5
*Elset, elset=Edge-41
12078, 12203, 12328, 12453, 12578, 12703
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*Distribution, name=EdgeDist-41, location=ELEMENT, Table=EdgeDist-41_Table
,     1.
12078 , 0.4283
12203 , 0.4283
12328 , 0.4283
12453 , 0.4283
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24473 , 0.4283
*Shell Section, elset=Edge-41, material=MAT, controls=EC-1, shell thickness=EdgeDist-41
1., 5
*Elset, elset=Edge-42
12079, 12204, 12329, 12454, 12579, 12704
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*Distribution, name=EdgeDist-42, location=ELEMENT, Table=EdgeDist-42_Table
,     1.
12079 , 0.4283
12204 , 0.4283
12329 , 0.4283
12454 , 0.4283
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24474 , 0.4283
*Shell Section, elset=Edge-42, material=MAT, controls=EC-1, shell thickness=EdgeDist-42
1., 5
*Elset, elset=Edge-43
12080, 12205, 12330, 12455, 12580, 12705
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*Distribution, name=EdgeDist-43, location=ELEMENT, Table=EdgeDist-43_Table
,     1.
12080 , 1.5
12205 , 1.5
12330 , 1.5
12455 , 1.5
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24475 , 1.5
*Shell Section, elset=Edge-43, material=MAT, controls=EC-1, shell thickness=EdgeDist-43
1., 5
*Elset, elset=Edge-44
12101, 12226, 12351, 12476, 12601, 12726
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*Distribution, name=EdgeDist-44, location=ELEMENT, Table=EdgeDist-44_Table
,     1.
12101 , 1.5
12226 , 1.5
12351 , 1.5
12476 , 1.5
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24496 , 1.5
*Shell Section, elset=Edge-44, material=MAT, controls=EC-1, shell thickness=EdgeDist-44
1., 5
*Elset, elset=Edge-45
12102, 12227, 12352, 12477, 12602, 12727
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*Distribution, name=EdgeDist-45, location=ELEMENT, Table=EdgeDist-45_Table
,     1.
12102 , 0.4283
12227 , 0.4283
12352 , 0.4283
12477 , 0.4283
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24497 , 0.4283
*Shell Section, elset=Edge-45, material=MAT, controls=EC-1, shell thickness=EdgeDist-45
1., 5
*Elset, elset=Edge-46
12103, 12228, 12353, 12478, 12603, 12728
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*Distribution, name=EdgeDist-46, location=ELEMENT, Table=EdgeDist-46_Table
,     1.
12103 , 0.4283
12228 , 0.4283
12353 , 0.4283
12478 , 0.4283
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24498 , 0.4283
*Shell Section, elset=Edge-46, material=MAT, controls=EC-1, shell thickness=EdgeDist-46
1., 5
*Elset, elset=Edge-47
12104, 12229, 12354, 12479, 12604, 12729
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*Distribution, name=EdgeDist-47, location=ELEMENT, Table=EdgeDist-47_Table
,     1.
12104 , 0.4283
12229 , 0.4283
12354 , 0.4283
12479 , 0.4283
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24499 , 0.4283
*Shell Section, elset=Edge-47, material=MAT, controls=EC-1, shell thickness=EdgeDist-47
1., 5
*Elset, elset=Edge-48
12105, 12230, 12355, 12480, 12605, 12730
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*Distribution, name=EdgeDist-48, location=ELEMENT, Table=EdgeDist-48_Table
,     1.
12105 , 1.5
12230 , 1.5
12355 , 1.5
12480 , 1.5
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24500 , 1.5
*Shell Section, elset=Edge-48, material=MAT, controls=EC-1, shell thickness=EdgeDist-48
1., 5
*Elset, elset=SOLID
1, 121, 241, 361, 481, 601
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*Nset, nset=BOT_tie
1, 2, 3, 4, 5, 6
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*Nset, nset=TOP_tie
54601, 54602, 54603, 54604, 54605, 54606
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*End Part
*Heading
** Job name: BoundaryCond Model name: BoundaryConditions
** Generated by: Abaqus/CAE 2020
*Preprint, echo=NO, model=NO, history=NO, contact=NO
**
** PARTS
**
*Part, name=Plate
*Node
      1,           0.,           0.,           0.
      2,          10.,           0.,           0.
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*Element, type=R3D4
  1,   1,   2,  13,  12
  2,   2,   3,  14,  13
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*Node
    144,          50.,          60.,           0.
*Nset, nset=Plate-RefPt_, internal
144,
*Nset, nset=_PickedSet6, internal
 144,
*Element, type=MASS, elset=_PickedSet6_Mass_
121, 144
*Mass, elset=_PickedSet6_Mass_
0.5,
*End Part
**
**
** ASSEMBLY
**
*Assembly, name=Assembly
*Instance, name=PART-1-1, part=PART-1
*End Instance
**
*Instance, name=Plate-1, part=Plate
        -10.,         -10.,         400.
*End Instance
**
*Instance, name=Plate-2, part=Plate
        -10.,         -10.,           0.
*End Instance
**
*Nset, nset=_PickedSet8, internal, instance=Plate-2
 144,
*Nset, nset=_PickedSet9, internal, instance=Plate-2
 144,
*Nset, nset=_PickedSet10, internal, instance=Plate-2, generate
   1,  143,    1
*Elset, elset=_PickedSet10, internal, instance=Plate-2, generate
   1,  120,    1
*Nset, nset=_PickedSet11, internal, instance=Plate-1
 144,
*Nset, nset=_PickedSet12, internal, instance=Plate-1, generate
   1,  143,    1
*Elset, elset=_PickedSet12, internal, instance=Plate-1, generate
   1,  120,    1
*Nset, nset=_PickedSet13, internal, instance=Plate-1
 144,
*Nset, nset=_PickedSet14, internal, instance=Plate-1
 144,
** Constraint: Constraint-1
*Rigid Body, ref node=_PickedSet9, elset=_PickedSet10
** Constraint: Constraint-2
*Rigid Body, ref node=_PickedSet11, elset=_PickedSet12
*End Assembly
*Distribution Table, name=EdgeDist-0_Table
length
*Distribution Table, name=EdgeDist-1_Table
length
*Distribution Table, name=EdgeDist-2_Table
length
*Distribution Table, name=EdgeDist-3_Table
length
*Distribution Table, name=EdgeDist-4_Table
length
*Distribution Table, name=EdgeDist-5_Table
length
*Distribution Table, name=EdgeDist-6_Table
length
*Distribution Table, name=EdgeDist-7_Table
length
*Distribution Table, name=EdgeDist-8_Table
length
*Distribution Table, name=EdgeDist-9_Table
length
*Distribution Table, name=EdgeDist-10_Table
length
*Distribution Table, name=EdgeDist-11_Table
length
*Distribution Table, name=EdgeDist-12_Table
length
*Distribution Table, name=EdgeDist-13_Table
length
*Distribution Table, name=EdgeDist-14_Table
length
*Distribution Table, name=EdgeDist-15_Table
length
*Distribution Table, name=EdgeDist-16_Table
length
*Distribution Table, name=EdgeDist-17_Table
length
*Distribution Table, name=EdgeDist-18_Table
length
*Distribution Table, name=EdgeDist-19_Table
length
*Distribution Table, name=EdgeDist-20_Table
length
*Distribution Table, name=EdgeDist-21_Table
length
*Distribution Table, name=EdgeDist-22_Table
length
*Distribution Table, name=EdgeDist-23_Table
length
*Distribution Table, name=EdgeDist-24_Table
length
*Distribution Table, name=EdgeDist-25_Table
length
*Distribution Table, name=EdgeDist-26_Table
length
*Distribution Table, name=EdgeDist-27_Table
length
*Distribution Table, name=EdgeDist-28_Table
length
*Distribution Table, name=EdgeDist-29_Table
length
*Distribution Table, name=EdgeDist-30_Table
length
*Distribution Table, name=EdgeDist-31_Table
length
*Distribution Table, name=EdgeDist-32_Table
length
*Distribution Table, name=EdgeDist-33_Table
length
*Distribution Table, name=EdgeDist-34_Table
length
*Distribution Table, name=EdgeDist-35_Table
length
*Distribution Table, name=EdgeDist-36_Table
length
*Distribution Table, name=EdgeDist-37_Table
length
*Distribution Table, name=EdgeDist-38_Table
length
*Distribution Table, name=EdgeDist-39_Table
length
*Distribution Table, name=EdgeDist-40_Table
length
*Distribution Table, name=EdgeDist-41_Table
length
*Distribution Table, name=EdgeDist-42_Table
length
*Distribution Table, name=EdgeDist-43_Table
length
*Distribution Table, name=EdgeDist-44_Table
length
*Distribution Table, name=EdgeDist-45_Table
length
*Distribution Table, name=EdgeDist-46_Table
length
*Distribution Table, name=EdgeDist-47_Table
length
*Distribution Table, name=EdgeDist-48_Table
length
*Section Controls, name=EC-1, ELEMENT DELETION=YES
1., 1., 1.
**
** MATERIALS
**
*Material, name=MAT
*Density
 2.7e-09,
*Elastic
70000., 0.33
*Plastic
  180.,   0.
  190., 0.01
  197., 0.02
 211.5, 0.05
 225.8,  0.1
 233.6, 0.15
 238.5,  0.2
 248.5,  0.4
**
** INTERACTION PROPERTIES
**
*Surface Interaction, name=INTPROP-1
*Friction
 0.5,
*Surface Behavior, pressure-overclosure=HARD
**
** BOUNDARY CONDITIONS
**
** Name: BC-1 Type: Symmetry/Antisymmetry/Encastre
*Boundary
_PickedSet8, ENCASTRE
** Name: BC-2 Type: Displacement/Rotation
*Boundary
_PickedSet13, 1, 1
_PickedSet13, 2, 2
_PickedSet13, 4, 4
_PickedSet13, 5, 5
_PickedSet13, 6, 6
**
** PREDEFINED FIELDS
**
** Name: InitialVelocity   Type: Velocity
*Initial Conditions, type=VELOCITY
_PickedSet14, 3, -5000.
**
** INTERACTIONS
**
** Interaction: Int-1
*Contact, op=NEW
*Contact Inclusions, ALL EXTERIOR
*Contact Property Assignment
 ,  , INTPROP-1
** ----------------------------------------------------------------
**
** STEP: Step-1
**
*Step, name=Step-1, nlgeom=YES
*Dynamic, Explicit
, 0.01
*Bulk Viscosity
0.06, 1.2
** Mass Scaling: Semi-Automatic
**               Whole Model
*Fixed Mass Scaling, dt=2e-07, type=below min
**
** OUTPUT REQUESTS
**
*Restart, write, number interval=1, time marks=NO
**
** FIELD OUTPUT: F-Output-1
**
*Output, field
*Node Output
U,
*Element Output, directions=YES
DMICRT, ELEN, PEEQ, S, SDEG, STATUS, STH
**
** HISTORY OUTPUT: H-Output-1
**
*Output, history, variable=PRESELECT
*End Step
